x := transpose([0, 0.31, 0.63, 0.94, 1.25, 1.57, 1.88, 2.19, 2.5, 2.81, 3.13])
y := transpose([2.083333333, 12.5, 23.61111111, 33.33333333, 44.44444444, 54.16666667, 63.88888889, 72.91666667, 81.94444444, 89.58333333, 94.44444444])
T := 0, 0.1 .. 4
q := cspline(x, y)
P(T) := interp(q, x, y, T)
i := transpose([0, 0.94, 1.34, 1.64, 1.9, 2.12, 2.322, 2.51, 2.68, 2.84, 3])
m := 0, 0.01 .. 3.2
P(i) = [2.08333; 33.3333; 47.3328; 56.3273; 64.4958; 70.8968; 76.7994; 82.2224; 86.6545; 90.1911; 92.9298]
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P(m) = [
    2.08333; 2.38467; 2.68924; 2.99694; 3.30767; 3.62135; 3.93788; 4.25717; 4.57911; 4.90361
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]
m = [
    0; 0.01; 0.02; 0.03; 0.04; 0.05; 0.06; 0.07; 0.08; 0.09
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]
