x := transpose([293, 295, 297, 299, 301, 303, 305, 307, 309, 311, 313, 315, 317, 319, 321, 323, 325, 327, 329, 331, 333])
y := transpose([1891.529551, 1972.777481, 2331.763947, 2621.85079, 2851.721184, 3228.738147, 3658.813477, 4205.435188, 4646.997888, 5392.496231, 6100.580677, 6901.006852, 7892.782603, 9021.324474, 10085.71418, 11060.91073, 12383.99995, 13625.37387, 15074.38138, 16649.55319, 18834.66253])
T := 1, 1.1 .. 340
q := cspline(x, y)
P(T) := interp(q, x, y, T)
g(T) := d/dT(P(T))
L(T) := 8.314*T^2*g(T)/P(T)
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L(293) =  # no stored result
i := 1, 1.1 .. 333
i =  # no stored result
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L(i) =  # no stored result
y := [-37300; 53210; 56260; 32030; 39380; 47510; 54470; 43480; 49730; 57080; 47830; 53450; 57320; 53220; 40620; 45430; 46250; 42980; 44690; 48330; 66500]
x := [293; 295; 297; 299; 301; 303; 305; 307; 309; 311; 313; 315; 317; 319; 321; 323; 325; 327; 329; 331; 333]
k := 4
s := regress(x, y, k)
t := 1, 3 .. 333
L(t) := interp(s, x, y, t)
b := submatrix(s, 3, length(s) - 1, 0, 0)
b =  # no stored result
F(w) := [1, w, w^2, w^3, w^4]*b
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integral(F(w), w = 293 .. 333)/(333 - 293) =  # no stored result
F(i) =  # no stored result
