x := transpose([293, 295, 297, 299, 301, 303, 305, 307, 309, 311, 313, 315, 317, 319, 321, 323, 325, 327, 329, 331, 333])
y := transpose([1891.529551, 1972.777481, 2331.763947, 2621.85079, 2851.721184, 3228.738147, 3658.813477, 4205.435188, 4646.997888, 5392.496231, 6100.580677, 6901.006852, 7892.782603, 9021.324474, 10085.71418, 11060.91073, 12383.99995, 13625.37387, 15074.38138, 16649.55319, 18834.66253])
T := 1, 1.1 .. 340
q := cspline(x, y)
P(T) := interp(q, x, y, T)
g(T) := d/dT(P(T))
L(T) := 8.314*T^2*g(T)/P(T)
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L(293) = -37301.3
i := 1, 3 .. 333
i = [
    1; 3; 5; 7; 9; 11; 13; 15; 17; 19
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]
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L(i) = [
    -0.0844703; -0.765418; -2.14076; -4.22491; -7.03266; -10.5792; -14.8803; -19.952; -25.8107; -32.4737
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]
y := [39380; 47510; 43480; 45430; 48330]
x := [301; 303; 307; 323; 331]
k := 3
s := regress(x, y, k)
t := 1, 3 .. 333
L(t) := interp(s, x, y, t)
b := submatrix(s, 3, length(s) - 1, 0, 0)
b = [-50558504; 479910; -1516.67; 1.59727]
F(w) := [1, w, w^2, w^3]*b
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integral(F(w), w = 301 .. 331)/(331 - 301) = 45432.8
i := 1, 1.1 .. 331
F(i) =  # no stored result
i =  # no stored result
F(295) = 32556.5
F(301) = 41684.6
x := transpose([301, 303, 307, 323, 331])
y := transpose([2851.721184, 3228.738147, 4205.435188, 11060.91073, 16649.55319])
k := 3
s := regress(x, y, k)
P(t) := interp(s, x, y, t)
b := submatrix(s, 3, length(s) - 1, 0, 0)
b = [-1214538; 13987.2; -53.2231; 0.0670792]
t := 1, 1.1 .. 350
P(t) := [1, t, t^2, t^3]*b
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