x := □  # error: Пустой местозаполнитель.
x := transpose([
    293, 293.1, 293.2, 293.3, 293.4, 293.5, 293.6, 293.7, 293.8, 293.9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])
y := transpose([
    -37301.25719, -30984.66718, -24776.33248, -18695.31884, -12759.59571, -6985.902142, -1389.636032, 4015.232152, 9216.220907, 14202.37474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])
k := 4
s := regress(x, y, k)
t := 1, 1.5 .. 340
L(t) := interp(s, x, y, t)
b := submatrix(s, 3, length(s) - 1, 0, 0)
b = [2710194; -373746; 3388.13; -10.5462; 0.0110215]
L(300) = 44972.5
f(m) := L(m)
F(w) := [1, w, w^2, w^3, w^4]*b
F(300) = 44972.5
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integral(F(w), w = 293 .. 333)/(333 - 293) = 46779
